# OpenSim document version 40000
ForceSet gait2354_CMC:
  defaults: CoordinateActuator default: optimal_force=1000
  PointActuator FX: body=pelvis point=(-0,072437600000000005 0 0) point_is_global=false direction=(-1 0 0)
      force_is_global=true optimal_force=100
  PointActuator FY: body=pelvis point=(-0,072437600000000005 0 0) point_is_global=false direction=(0 -1 0)
      force_is_global=true optimal_force=200
  PointActuator FZ: body=pelvis point=(-0,072437600000000005 0 0) point_is_global=false direction=(0 0 -1)
      force_is_global=true optimal_force=100
  TorqueActuator MX: bodyA=pelvis bodyB=ground torque_is_global=true axis=(-1 0 0) optimal_force=80
  TorqueActuator MY: bodyA=pelvis bodyB=ground torque_is_global=true axis=(0 -1 0) optimal_force=80
  TorqueActuator MZ: bodyA=pelvis bodyB=ground torque_is_global=true axis=(0 0 -1) optimal_force=80
  # legs
  CoordinateActuator hip_flexion_r_reserve: coordinate=hip_flexion_r optimal_force=1
  CoordinateActuator hip_adduction_r_reserve: coordinate=hip_adduction_r optimal_force=1
  CoordinateActuator hip_rotation_r_reserve: coordinate=hip_rotation_r optimal_force=1
  CoordinateActuator knee_angle_r_reserve: coordinate=knee_angle_r optimal_force=1
  CoordinateActuator ankle_angle_r_reserve: coordinate=ankle_angle_r optimal_force=1
  CoordinateActuator hip_flexion_l_reserve: coordinate=hip_flexion_l optimal_force=1
  CoordinateActuator hip_adduction_l_reserve: coordinate=hip_adduction_l optimal_force=1
  CoordinateActuator hip_rotation_l_reserve: coordinate=hip_rotation_l optimal_force=1
  CoordinateActuator knee_angle_l_reserve: coordinate=knee_angle_l optimal_force=1
  CoordinateActuator ankle_angle_l_reserve: coordinate=ankle_angle_l optimal_force=1
  # lumbar
  CoordinateActuator lumbar_extension_reserve: coordinate=lumbar_extension optimal_force=1
  CoordinateActuator lumbar_bending_reserve: coordinate=lumbar_bending optimal_force=1
  CoordinateActuator lumbar_rotation_reserve: coordinate=lumbar_rotation optimal_force=1
  # upper arm
  CoordinateActuator arm_flex_r_reserve: coordinate=arm_flex_r optimal_force=1
  CoordinateActuator arm_add_r_reserve: coordinate=arm_add_r optimal_force=1
  CoordinateActuator arm_rot_r_reserve: coordinate=arm_rot_r optimal_force=1
  CoordinateActuator arm_flex_l_reserve: coordinate=arm_flex_l optimal_force=1
  CoordinateActuator arm_add_l_reserve: coordinate=arm_add_l optimal_force=1
  CoordinateActuator arm_rot_l_reserve: coordinate=arm_rot_l optimal_force=1
  # lower arm
  CoordinateActuator elbow_flex_r_reserve: coordinate=elbow_flex_r optimal_force=1
  CoordinateActuator elbow_flex_l_reserve: coordinate=elbow_flex_l optimal_force=1
  CoordinateActuator pro_sup_r_reserve: coordinate=pro_sup_r optimal_force=1
  CoordinateActuator pro_sup_l_reserve: coordinate=pro_sup_l optimal_force=1
