# OpenSim document version 40000
AnalyzeTool pert_subject06:
  model_file: /home/none/Downloads/TUd_2020-2021/Research/master_thesis/2_experiments/motion_capture/Guoping/sub06/opensimModel/sub06_model.osim
  replace_force_set: false
  results_directory: /home/none/Downloads/TUd_2020-2021/Research/master_thesis/2_experiments/motion_capture/Guoping/sub06/Analysis/IK/matlab/CoM/../../../../opensimModel
  output_precision: 8
  initial_time: 0
  final_time: 10
  solve_for_equilibrium_for_auxiliary_states: false
  maximum_number_of_integrator_steps: 20000
  maximum_integrator_step_size: 1
  minimum_integrator_step_size: 1e-8
  integrator_error_tolerance: 1,0000000000000001e-05
  coordinates_file: /home/none/Downloads/TUd_2020-2021/Research/master_thesis/2_experiments/motion_capture/Guoping/sub06/Analysis/IK/matlab/CoM/../../results/ik-01-01.mot
  lowpass_cutoff_frequency_for_coordinates: -1
  AnalysisSet Analyses:
    BodyKinematics: start_time=0 end_time=1,8839999999999999 step_interval=1 in_degrees=true bodies=all
        express_results_in_body_local_frame=false
