# OpenSim document version 40000
InverseKinematicsTool:
  results_directory: ../Analysis/IK/results
  model_file: ../../opensimModel/sub06_model_Rajagopal.osim
  constraint_weight: Inf
  accuracy: 1e-5
  marker_file: ../MarkerTrc/qtm-01-01.trc
  time_range: 0 100
  report_errors: true
  output_motion_file: ../Analysis/IK/results/ik-01-01.mot
  report_marker_locations: false
  IKTaskSet:
    IKMarkerTask R.Acromium: apply=true weight=5
    IKMarkerTask L.Acromium: apply=true weight=5
    IKMarkerTask C7: apply=true weight=50
    IKMarkerTask R.Elbow: apply=true weight=10
    IKMarkerTask L.Elbow: apply=true weight=10
    IKMarkerTask R.ASIS: apply=true weight=30
    IKMarkerTask L.ASIS: apply=true weight=30
    IKMarkerTask V.Sacral: apply=true weight=10
    IKMarkerTask R.Thigh.Upper: apply=true weight=5
    IKMarkerTask R.Knee.Lat: apply=true weight=30
    IKMarkerTask R.Knee.Med: apply=true weight=30
    IKMarkerTask R.Ankle.Lat: apply=true weight=50
    IKMarkerTask R.Ankle.Med: apply=true weight=50
    IKMarkerTask R.Toe.Tip: apply=true weight=30
    IKMarkerTask L.Thigh.Upper: apply=true weight=5
    IKMarkerTask L.Knee.Lat: apply=true weight=30
    IKMarkerTask L.Knee.Med: apply=true weight=30
    IKMarkerTask L.Ankle.Lat: apply=true weight=50
    IKMarkerTask L.Ankle.Med: apply=true weight=50
    IKMarkerTask L.Toe.Tip: apply=true weight=30
    IKMarkerTask R.Wrist.Lat: apply=true weight=10
    IKMarkerTask L.Wrist.Lat: apply=true weight=10
    IKMarkerTask L.Heel: apply=true weight=50
    IKMarkerTask R.Heel: apply=true weight=50
