# OpenSim document version 40000
ControlSet Control Set:
  defaults: ControlLinear default: is_model_control=true extrapolate=true default_min=-1 default_max=1 filter_on=false
      use_steps=false kp=100 kv=20
  ControlLinear [values shared by the 29 below unless stated]: is_model_control=true extrapolate=true filter_on=false
      use_steps=false kp=100 kv=20 default_min=-1 default_max=1
  ControlLinear FX.excitation: default_min=-20 default_max=20
  ControlLinear FY.excitation: default_min=-20 default_max=20
  ControlLinear FZ.excitation: default_min=-20 default_max=20
  ControlLinear MX.excitation: default_min=-50 default_max=50
  ControlLinear MY.excitation: default_min=-50 default_max=50
  ControlLinear MZ.excitation: default_min=-50 default_max=50
  ControlLinear hip_flexion_r.excitation
  ControlLinear hip_adduction_r.excitation
  ControlLinear hip_rotation_r.excitation
  ControlLinear knee_angle_r.excitation
  ControlLinear ankle_angle_r.excitation
  ControlLinear hip_flexion_l.excitation
  ControlLinear hip_adduction_l.excitation
  ControlLinear hip_rotation_l.excitation
  ControlLinear knee_angle_l.excitation
  ControlLinear ankle_angle_l.excitation
  ControlLinear lumbar_extension.excitation
  ControlLinear lumbar_bending.excitation
  ControlLinear lumbar_rotation.excitation
  ControlLinear arm_flex_r.excitation
  ControlLinear arm_add_r.excitation
  ControlLinear arm_rot_r.excitation
  ControlLinear arm_flex_l.excitation
  ControlLinear arm_add_l.excitation
  ControlLinear arm_rot_l.excitation
  ControlLinear elbow_flex_r.excitation
  ControlLinear elbow_flex_l.excitation
  ControlLinear pro_sup_r.excitation
  ControlLinear pro_sup_l.excitation
