# OpenSim document version 40000
ScaleTool pert_subject06:
  mass: 66.5138 [kg]
  height: 1830
  age: 21
  notes:
    subject information from CLAY'S SIMULATION delaware2_setup_scale.xml
  ModelScaler:
    apply: true
    scaling_order: measurements manualScale
    marker_file: ../qtm-aim.trc
    time_range: 4.8 10.3
    preserve_mass_distribution: true
    output_scale_file: sub06_scaleSet_applied.xml
    MeasurementSet subject02:
      Measurement torso: apply=true
        MarkerPair: markers=(L.ASIS L.Acromium)
        MarkerPair: markers=(R.ASIS R.Acromium)
        MarkerPair: markers=(C7 L.ASIS)
        MarkerPair: markers=(C7 R.ASIS)
        BodyScale torso: axes=(X Y Z)
      Measurement pelvis: apply=true
        MarkerPair: markers=(R.ASIS L.ASIS)
        MarkerPair: markers=(V.Sacral R.ASIS)
        MarkerPair: markers=(V.Sacral L.ASIS)
        BodyScale pelvis: axes=(X Y Z)
      Measurement thigh: apply=true
        MarkerPair: markers=(R.Thigh.Upper R.Knee.Lat)
        MarkerPair: markers=(L.Thigh.Upper L.Knee.Lat)
        MarkerPair: markers=(R.Thigh.Upper R.Knee.Med)
        MarkerPair: markers=(L.Thigh.Upper L.Knee.Med)
        BodyScale femur_r: axes=(X Y Z)
        BodyScale femur_l: axes=(X Y Z)
      Measurement shank: apply=true
        MarkerPair: markers=(R.Knee.Lat R.Ankle.Lat)
        MarkerPair: markers=(L.Knee.Lat L.Ankle.Lat)
        MarkerPair: markers=(R.Knee.Med R.Ankle.Med)
        MarkerPair: markers=(L.Knee.Med L.Ankle.Med)
        BodyScale tibia_r: axes=(X Y Z)
        BodyScale talus_r: axes=(X Y Z)
        BodyScale tibia_l: axes=(X Y Z)
        BodyScale talus_l: axes=(X Y Z)
      Measurement foot: apply=true
        MarkerPair: markers=(L.Heel L.Toe.Tip)
        MarkerPair: markers=(R.Heel R.Toe.Tip)
        BodyScale calcn_r: axes=(X Y Z)
        BodyScale toes_r: axes=(X Y Z)
        BodyScale calcn_l: axes=(X Y Z)
        BodyScale toes_l: axes=(X Y Z)
      Measurement humerus: apply=true
        MarkerPair: markers=(L.Acromium L.Elbow)
        MarkerPair: markers=(R.Acromium R.Elbow)
        BodyScale humerus_r: axes=(X Y Z)
        BodyScale humerus_l: axes=(X Y Z)
      Measurement radius_ulna: apply=true
        MarkerPair: markers=(R.Elbow R.Wrist.Lat)
        MarkerPair: markers=(L.Elbow L.Wrist.Lat)
        BodyScale ulna_r: axes=(X Y Z)
        BodyScale radius_r: axes=(X Y Z)
        BodyScale ulna_l: axes=(X Y Z)
        BodyScale radius_l: axes=(X Y Z)
    ScaleSet subject02_Scale:
      Scale: scales=(1.11031 1.11031 1.11031) segment=femur_r apply=false
      Scale: scales=(0.962095 0.962095 0.962095) segment=tibia_r apply=false
      Scale: scales=(1 1 1) segment=calcn_r apply=true
      Scale: scales=(1 1 1) segment=toes_r apply=true
      Scale: scales=(1.05746 1.05746 1.05746) segment=femur_l apply=false
      Scale: scales=(0.962095 0.962095 0.962095) segment=tibia_l apply=false
      Scale: scales=(1 1 1) segment=calcn_l apply=true
      Scale: scales=(1 1 1) segment=toes_l apply=true
      Scale: scales=(0.95 0.95 0.95) segment=humerus_r apply=false
      Scale: scales=(0.95 0.95 0.95) segment=humerus_l apply=false
  MarkerPlacer:
    apply: true
    marker_file: ../qtm-aim.trc
    time_range: 0 1.4
    output_motion_file: sub06_static_output.mot
    output_model_file: sub06_adjusted_scaled.osim
    max_marker_movement: -1
    IKTaskSet subject02_Scale:
      IKMarkerTask R.Acromium: apply=true weight=20
      IKMarkerTask L.Acromium: apply=true weight=20
      IKMarkerTask C7: apply=true weight=50
      IKMarkerTask R.Elbow: apply=true weight=20
      IKMarkerTask L.Elbow: apply=true weight=20
      IKMarkerTask R.ASIS: apply=true weight=30
      IKMarkerTask L.ASIS: apply=true weight=30
      IKMarkerTask V.Sacral: apply=true weight=10
      IKMarkerTask R.Thigh.Upper: apply=true weight=30
      IKMarkerTask R.Knee.Lat: apply=true weight=50
      IKMarkerTask R.Knee.Med: apply=true weight=50
      IKMarkerTask R.Ankle.Lat: apply=true weight=50
      IKMarkerTask R.Ankle.Med: apply=true weight=50
      IKMarkerTask R.Toe.Tip: apply=true weight=30
      IKMarkerTask L.Thigh.Upper: apply=true weight=30
      IKMarkerTask L.Knee.Lat: apply=true weight=50
      IKMarkerTask L.Knee.Med: apply=true weight=50
      IKMarkerTask L.Ankle.Lat: apply=true weight=50
      IKMarkerTask L.Ankle.Med: apply=true weight=50
      IKMarkerTask L.Toe.Tip: apply=true weight=30
      IKMarkerTask R.Wrist.Lat: apply=true weight=30
      IKMarkerTask L.Wrist.Lat: apply=true weight=30
      IKMarkerTask L.Heel: apply=true weight=30
      IKMarkerTask R.Heel: apply=true weight=30
      IKCoordinateTask pelvis_tilt: apply=true weight=1 value_type=default_value value=0
      IKCoordinateTask pelvis_list: apply=true weight=1 value_type=default_value value=0
      IKCoordinateTask hip_flexion_r: apply=false weight=1 value_type=default_value value=0
      IKCoordinateTask hip_rotation_r: apply=false weight=5 value_type=manual_value value=-0.08726646
      IKCoordinateTask ankle_angle_r: apply=false weight=10 value_type=manual_value value=0.00872665
      IKCoordinateTask hip_flexion_l: apply=false weight=1 value_type=default_value value=0
      IKCoordinateTask hip_rotation_l: apply=false weight=5 value_type=manual_value value=-0.08726646
      IKCoordinateTask ankle_angle_l: apply=false weight=10 value_type=manual_value value=0.00872665
      IKCoordinateTask lumbar_extension: apply=true weight=1 value_type=default_value value=0
      IKCoordinateTask lumbar_bending: apply=true weight=1 value_type=default_value value=0
      IKCoordinateTask lumbar_rotation: apply=true weight=1 value_type=default_value value=0
      IKCoordinateTask arm_flex_r: apply=false weight=5 value_type=default_value value=0
      IKCoordinateTask arm_rot_r: apply=false weight=5 value_type=default_value value=0
      IKCoordinateTask elbow_flex_r: apply=false weight=1 value_type=manual_value value=0.08726646
      IKCoordinateTask pro_sup_r: apply=false weight=1 value_type=manual_value value=1.570796
      IKCoordinateTask arm_flex_l: apply=false weight=5 value_type=default_value value=0
      IKCoordinateTask arm_rot_l: apply=false weight=5 value_type=default_value value=0
      IKCoordinateTask elbow_flex_l: apply=false weight=1 value_type=manual_value value=0.08726646
      IKCoordinateTask pro_sup_l: apply=false weight=1 value_type=manual_value value=1.570796
