# OpenSim document version 40000
AnalyzeTool an_com:
  model_file: sub06_model.osim
  replace_force_set: false
  output_precision: 8
  initial_time: 0
  final_time: 30.27
  solve_for_equilibrium_for_auxiliary_states: false
  maximum_number_of_integrator_steps: 20000
  maximum_integrator_step_size: 1
  minimum_integrator_step_size: 1e-8
  integrator_error_tolerance: 1e-5
  external_loads_file: ../../resultIKID/sub05/Setup/external_loads-01-01.xml
  coordinates_file: D:/Guoping/nextcloud_stairwalking/016Stairs/mFile/resultDataOpenSim/opensimModel/sub05/../../resultIKID/sub05/ik-01-01.mot
  lowpass_cutoff_frequency_for_coordinates: 10
  AnalysisSet Analyses:
    BodyKinematics: start_time=0 end_time=30.27 step_interval=1 in_degrees=true bodies=all
        express_results_in_body_local_frame=false
