# OpenSim document version 40000
InverseKinematicsTool:
  results_directory: ./
  constraint_weight: Inf
  accuracy: 1e-5
  marker_file: ../qtm-06-03.trc
  time_range: 0 1.776
  report_errors: true
  report_marker_locations: false
  IKTaskSet:
    IKMarkerTask R.Acromium: apply=true weight=5
    IKMarkerTask L.Acromium: apply=true weight=5
    IKMarkerTask C7: apply=true weight=50
    IKMarkerTask R.Elbow: apply=true weight=10
    IKMarkerTask L.Elbow: apply=true weight=10
    IKMarkerTask R.ASIS: apply=true weight=30
    IKMarkerTask L.ASIS: apply=true weight=30
    IKMarkerTask V.Sacral: apply=true weight=10
    IKMarkerTask R.Thigh.Upper: apply=true weight=5
    IKMarkerTask R.Knee.Lat: apply=true weight=30
    IKMarkerTask R.Knee.Med: apply=true weight=30
    IKMarkerTask R.Ankle.Lat: apply=true weight=50
    IKMarkerTask R.Ankle.Med: apply=true weight=50
    IKMarkerTask R.Toe.Tip: apply=true weight=30
    IKMarkerTask L.Thigh.Upper: apply=true weight=5
    IKMarkerTask L.Knee.Lat: apply=true weight=30
    IKMarkerTask L.Knee.Med: apply=true weight=30
    IKMarkerTask L.Ankle.Lat: apply=true weight=50
    IKMarkerTask L.Ankle.Med: apply=true weight=50
    IKMarkerTask L.Toe.Tip: apply=true weight=30
    IKMarkerTask R.Wrist.Lat: apply=true weight=10
    IKMarkerTask L.Wrist.Lat: apply=true weight=10
    IKMarkerTask L.Heel: apply=true weight=50
    IKMarkerTask R.Heel: apply=true weight=50
